// SBML level 2 version 4
// This model was downloaded from BioModels Database
// http://www.ebi.ac.uk/biomodels/

model Gardner1998_CellCycle_Goldbeter()
  // This a model from the article:
  // A theory for controlling cell cycle dynamics using a reversibly binding inhibitor.
  // Gardner TS, Dolnik M, Collins JJ Proc. Natl. Acad. Sci. U.S.A.1998:95(24):14190-14195 9826676,
  // Abstract:
  // We demonstrate, by using mathematical modeling of cell division cycle (CDC) dynamics, a potential mechanism for precisely controlling the frequency of cell division and regulating the size of a dividing cell. Control of the cell cycle is achieved by artificially expressing a protein that reversibly binds and inactivates any one of the CDC proteins. In the simplest case, such as the checkpoint-free situation encountered in early amphibian embryos, the frequency of CDC oscillations can be increased or decreased by regulating the rate of synthesis, the binding rate, or the equilibrium constant of the binding protein. In a more complex model of cell division, where size-control checkpoints are included, we show that the same reversible binding reaction can alter the mean cell mass in a continuously dividing cell. Because this control scheme is general and requires only the expression of a single protein, it provides a practical means for tuning the characteristics of the cell cycle in vivo.
  // This is a Systems Biology Markup Language (SBML) file, generated by MathSBML 2.6.0.p960929 (Prerelease Version of 29-Sept-2006) 1-October-2006 15:36:36.076517. SBML is a form of XML, and most XML files will not display properly in an internet browser. To view the contents of an XML file use the "Page Source" or equivalent button on you browser.
  // This model originates from BioModels Database: A Database of Annotated Published Models. It is copyright (c) 2005-2011 The BioModels.net Team.
  // For more information see the terms of use.
  // To cite BioModels Database, please use: Li C, Donizelli M, Rodriguez N, Dharuri H, Endler L, Chelliah V, Li L, He E, Henry A, Stefan MI, Snoep JL, Hucka M, Le Novère N, Laibe C (2010) BioModels Database: An enhanced, curated and annotated resource for published quantitative kinetic models. BMC Syst Biol., 4:92.
  // biomodels.db:BIOMD0000000008
  // biomodels.db:MODEL6614879888
  // isDescribedBy pubmed:9826676
  // isHomologTo reactome:REACT_152
  // isVersionOf GO:0000278
  // taxonomy:8292

  // Compartments:
  compartment Cell = 1 volume;  // GO:0005737

  // Species:
  species C in Cell = 0; C is "cyclin";  // interpro:IPR006670
  species X in Cell = 0; X is "protease";  // isVersionOf GO:0008233
  species M in Cell = 0; M is "cdc2k";  // hasVersion uniprot:P35567 uniprot:P24033
  species Y in Cell = 1/Cell; Y is "cyclin inhibitor";
  species Z in Cell = 1/Cell; Z is "complex inhibitor-cyclin";  // hasPart interpro:IPR006670

  // Parameters:
  K6 = 0.3;
  V1p = 0.75;
  V3p = 0.3;

  // Assignment rules:
  V1 := C*V1p*(C + K6)^(-1);
  V3 := M*V3p;

  // Reactions:
  creation_of_cyclin: => C; vi;  // isVersionOf GO:0006412
    vi = 0.1;
  reaction2: C => ; C*k1*X*(C + K5)^(-1); reaction2 is "cdc2 kinase triggered degration of cyclin";  // modifiers: X; isVersionOf GO:0008054
    k1 = 0.5; K5 = 0.02;
  default_degradation_of_cyclin: C => ; C*default_degradation_of_cyclin_kd;  // isVersionOf GO:0008054
    default_degradation_of_cyclin_kd = 0.02;
  activation_of_cdc2_kinase: => M; (1 + (-1*M))*V1*(K1 + (-1*M) + 1)^(-1);  // isVersionOf GO:0045737
    K1 = 0.1;
  deactivation_of_cdc2_kinase: M => ; M*V2*(K2 + M)^(-1);  // isVersionOf GO:0045736
    V2 = 0.25; K2 = 0.1;
  activation_of_cyclin_protease: => X; V3*(1 + (-1*X))*(K3 + (-1*X) + 1)^(-1);
    K3 = 0.2;
  deactivation_of_cyclin_protease: X => ; V4*X*(K4 + X)^(-1);
    K4 = 0.1; V4 = 0.1;
  reaction8: C + Y => Z; a1*C*Y;
    a1 = 0.05;
  reaction9: Z => C + Y; a2*Z;  // isVersionOf GO:0043241
    a2 = 0.05;
  desinhibition_of_cyclin: Z => C; desinhibition_of_cyclin_alpha*desinhibition_of_cyclin_d1*Z;  // isVersionOf GO:0044257
    desinhibition_of_cyclin_alpha = 0.1; desinhibition_of_cyclin_d1 = 0.05;
  degradation_of_inhibited_cyclin: Z => Y; degradation_of_inhibited_cyclin_alpha*degradation_of_inhibited_cyclin_kd*Z;  // isVersionOf GO:0008054
    degradation_of_inhibited_cyclin_kd = 0.02; degradation_of_inhibited_cyclin_alpha = 0.1;
  creation_of_cyclin_inhibitor: => Y; vs;  // isVersionOf GO:0006412
    vs = 0.2;
  degradation_of_cyclin_inhibitor: Y => ; degradation_of_cyclin_inhibitor_d1*Y;  // isVersionOf GO:0044257
    degradation_of_cyclin_inhibitor_d1 = 0.05;
end
